# Document Information
# Title:
# Customer:
# Project:
# Document No.:
# Author: C. Petty
# Revision History
# ECO  Description of Change  Revision  Revision Date
# TBD  Initial Release  TBD  XXXX/XX/XX
# Introduction
# x
# Assumptions
# - x
# References
# [1]  x
# How to Read This Document
#
# Keep this section in final releases to aid in the explanation of how to read this template. See the work instruction in the base template for detailed instructions.
#
# Dimension input:
# - sym(d, tol), where d is the nominal dimension and tol is the +/- symmetrical tolerance.
# - asym(d, tol_upper, tol_lower), where d is the nominal dimension, and tol_upper and tol_lower are the asymmetric tolerances above and below the nominal value, respectively.
# - limit(d_upper, d_lower), where d_upper is the upper limit and d_lower is the lower limit.
# - boss_hole(d_pin, d_hole), where d_pin and d_hole are also dimension inputs from one of the above three functions. This simulates a pin or fastener in a hole.
# Stackup computation where D is the dimension input matrix and S is the sign input matrix:
# - worst_case(D, S), computes the worst case arithmetic tolerance stackup
# - RSS(D, S), computes the root sum of squares statistical stackup
# - RSS1.5(D, S), computes an adjusted value between worst_case and RSS best for stackups with many parts
# Inputs
table  # each column defines a variable
    ID | DIM | SIGN
    1 | sym(3.3, 0.02)*in | "+"
    2 | sym(1, 0.005)*in | "-"
    3 | sym(0.75, 0.005)*in | "-"
    4 | sym(1.5, 0.005)*in | "-"
end table
# [Excel component]
    excel["G2"] := contribution(DIM)
# Stackup Diagram(s)
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# Results
worst_case(DIM, SIGN) = [0.085; 0.015] in
RSS(DIM, SIGN) = [0.0717945; 0.0282055] in
RSS1.5(DIM, SIGN) = [0.0826917; 0.0173083] in
# Functions (do not delete)
ORIGIN ≡ 1
stackup(D, S) ≡
    nom ← 0
    tol ← 0
    tol_RSS ← 0
    for i ∈ 1, 2 .. rows(D)
        this.nom ← D[i, 1][1]
        this.tol ← D[i, 1][2]
        if S[i] == "+"
            nom ← nom + this.nom
        else if S[i] == "-"
            nom ← nom - this.nom
        else
            error("Invalid sign")
        tol ← tol + this.tol
        tol_RSS ← tol_RSS + this.tol^2
    return [
        nom, nom, nom;
        tol, sqrt(tol_RSS), 1.5*sqrt(tol_RSS);
        nom + tol, nom + sqrt(tol_RSS), nom + 1.5*sqrt(tol_RSS);
        nom - tol, nom - sqrt(tol_RSS), nom - 1.5*sqrt(tol_RSS)
    ]
contribution(D) ≡
    tol ← 0
    for i ∈ 1, 2 .. rows(D)
        tol ← tol + D[i, 1][2]
    C ← 0
    for i ∈ 1, 2 .. rows(D)
        C[i] ← D[i, 1][2]/tol
    if round(sum(C), 3) ≠ 1
        error("Sum of contributions does not equal 1.")
    return C
sym(d, tol) ≡
    if d < 0 or tol < 0
        error("Dimension and tolerance must be positive.")
    return [d; tol]
asym(d, tol_upper, tol_lower) ≡
    if d < 0
        error("Dimension must be positive.")
    if tol_lower > tol_upper
        error("Tolerance values in incorrect order.")
    return [(((d + tol_lower) + (d + tol_upper))/2); (tol_upper - tol_lower)/2]
limit(d_upper, d_lower) ≡
    if d_upper < 0 or d_lower < 0
        error("Dimension must be positive.")
    if d_lower > d_upper
        error("Dimensions in incorrect order.")
    return [(d_upper + d_lower)/2; (d_upper - d_lower)/2]
boss_hole(d_pin, d_hole) ≡
    tol ← (d_hole[1, 1] + d_hole[2, 1] - (d_pin[1, 1] - d_pin[2, 1]))/2
    if tol ≥ 0
        "Clearance"
        return [0 furlong; tol]
    else
        "Press fit"
        return [0 Smoot; 0 Smoot]
worst_case(D, S) ≡ [stackup(D, S)[3, 1]; stackup(D, S)[4, 1]]
RSS(D, S) ≡ [stackup(D, S)[3, 2]; stackup(D, S)[4, 2]]
RSS1.5(D, S) ≡ [stackup(D, S)[3, 3]; stackup(D, S)[4, 3]]
# How to Use This Document (can delete)
# This template incorporates functionality from 001-000-249 Tolerance Analysis Template, but using Mathcad. Some additional functionality of this template includes:
# - Symmetric, asymmetric, and limit tolerance input
# - Multi-unit environment
# - Easier simple hole interface definitions
# This template is not efficient or capable of doing close fits, complex holes, or any GD&T specifications. Use this template for simple 1-dimensional traditional tolerance stackups. Fastener tolerances will need to be entered manually in the boss_hole function (more information below).
#
# 1. Input relevant dimensions in inputs table.
#
# Complete the Input Table, where ID is any unique name (for the user's reference only), DIM is dimension input (see below), and SIGN is a sign of either "+" or "-" only. The Excel component table can be used to input additional information regarding the elements in the stackup. Percent contribution of each item is automatically populated in the same order as the input table.
#
# Dimensional inputs must use one of 4 functions. These functions allow for inputs directly from its source, and automatically format it for use in this calculation. Units may be defined for the entire dimension set using the placeholder at the top of the inputs table, after individual length inputs, or after the use of one of the functions below.
# - sym(d, tol), where d is the nominal dimension and tol is the +/- symmetrical tolerance.
# - asym(d, tol_upper, tol_lower), where d is the nominal dimension, and tol_upper and tol_lower are the asymmetric tolerances above and below the nominal value, respectively.
# - limit(d_upper, d_lower), where d_upper is the upper limit and d_lower is the lower limit.
# - boss_hole(d_pin, d_hole), where d_pin and d_hole are also dimension inputs from one of the above three functions. boss_hole returns a dimension of 0 with a symmetrical assembly shift. If the fit results in a press at LMC, [0; 0] is returned.
# These dimension input functions normalize the dimension about a nominal value with a +/- symmetrical tolerance.
#
# 2. Supply additional information in the Excel table component
#
# 3. Compute a stackup.
#
# Once a dimension matrix is defined, compute the stackup using one or more of the following functions where D is the dimension input matrix and S is the sign input matrix:
# - worst_case(D, S)
# - RSS(D, S)
# - RSS1.5(D, S)
# This section may be deleted from final drafts.
