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# [3]
# Area of a circular segment captured by chord c some distance d from the center of the circle [3]
segment_area(R, d) ≡ R*(R*acos(d/R) - d*sqrt(1 - d^2/R^2))
# Check that d == -d_bolt/s is equal to A_bolt
segment_area(d_bolt/2, -d_bolt/2) == A_bolt =  # error: This variable is undefined. Check that the label is set correctly.
# Check that d == 0 is equal to 1/2*A_bolt
segment_area(d_bolt/2, 0*in) == A_bolt/2 =  # error
# Check that d == d_bolt/2 is equal to 0
segment_area(d_bolt/2, d_bolt/2) == 0 =  # error
# Visual check:
Y := -d_bolt, -d_bolt + 0.001*in .. d_bolt  # error: This variable is undefined. Check that the label is set correctly.
# [plot: segment_area(d_bolt/2, Y) (in^2) vs Y (in)]
