# Units
quart ≡ 32 fl_oz
pint ≡ 16 fl_oz
cup ≡ 8 fl_oz
tbsp ≡ 0.5 fl_oz
tsp ≡ tbsp/3
# Properties
ρ_salt_Redmond_coarse := 131 gm/(0.5 cup)
ρ_H2O := 1 gm/mL
# Weights
m_Fido_3 := 1225 gm  # Fido No. 3 large jar
m_sourdough_jar := 743 gm  # Sourdough starter jar
# Brine
target_salinity_by_weight := 3%
V_water := π/4*(9.5 in)^2*3.25 in = 0.99726 gal
ρ_salt := ρ_salt_Redmond_coarse
salt_required_mass := target_salinity_by_weight*V_water*ρ_H2O = 113.251 gm
# StarSan Sanitizer Dilution
recommended_strength_StarSan := 1 fl_oz/gal
V_sol_StarSan := 25 fl_oz
V_StarSan := recommended_strength_StarSan*V_sol_StarSan = 0.195312 fl_oz
