# Introduction
# The following calculates the expected junction temperature of an LED using package-specific measuring points and experimentally and statistically determined values in the LED's datasheet.
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# This specific script describes the measurement method and calculation for the junction temperature of OSRAM OSLON Black packaged LEDs. Because the junction of the diode cannot be measured directly in most cases, the temperature at a manufacturer specified location on the package is used, and the junction temperature is then calculated. OSRAM assumes that the methods of heat transfer are independent of the environment the LED is in; in order words, the package architecture determines the relationship between the junction temperature and solder point temperature.
# Calculation
T_s := 112.6 °C  # Solder point temperature, as measured
I_F := 700 mA  # Forward current, as measured
V_F := 3.366 V  # Forward voltage, per the LED datasheet
η := 0.3  # Efficiency of LED, estimated
R_th := [5.4, 7.6] K/W  # Thermal resistance range, per the LED datasheet
P_heat := I_F*V_F*(1 - η)  # Heat as a fraction of total electrical power dissipation, per AN085
T_j := T_s + P_heat*R_th  # Junction temperature, per AN085
T_j = [121.506, 125.135] °C  # Junction temperature
